*Heading
** Job name: Job-1 Model name: Model-1
** Generated by: Abaqus/CAE 2021
*Preprint, echo=NO, model=NO, history=NO, contact=NO
**
** PARTS
**
*Part, name=Part-1
*Node
      1,           0.,           0.
      2,          10.,           0.
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*Element, type=CPS4
  1,   1,   2,  13,  12
  2,   2,   3,  14,  13
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*Nset, nset=_PickedSet2, internal, generate
   1,  121,    1
*Elset, elset=_PickedSet2, internal, generate
   1,  100,    1
** Section: Section-1
*Solid Section, elset=_PickedSet2, material=Steel
,
*End Part
**
**
** ASSEMBLY
**
*Assembly, name=Assembly
**
*Instance, name=Part-1-1, part=Part-1
*End Instance
**
*Nset, nset=_PickedSet4, internal, instance=Part-1-1, generate
  1,  11,   1
*Elset, elset=_PickedSet4, internal, instance=Part-1-1, generate
  1,  10,   1
*Nset, nset=_PickedSet5, internal, instance=Part-1-1
 111,
*End Assembly
**
** MATERIALS
**
*Material, name=Steel
*Damping, alpha=0.03, beta=0.002
*Density
7800.,
*Elastic
 2.1e+11, 0.3
** ----------------------------------------------------------------
**
** STEP: StaticAna
**
*Step, name=StaticAna, nlgeom=NO
*Static
1., 1., 1e-05, 1.
**
** BOUNDARY CONDITIONS
**
** Name: BC-1 Type: Displacement/Rotation
*Boundary
_PickedSet4, 1, 1
_PickedSet4, 2, 2
**
** LOADS
**
** Name: Load-1   Type: Concentrated force
*Cload
_PickedSet5, 1, 1000.
**
** OUTPUT REQUESTS
**
*Restart, write, frequency=0
**
** FIELD OUTPUT: F-Output-1
**
*Output, field, variable=PRESELECT
**
** HISTORY OUTPUT: H-Output-1
**
*Output, history, variable=PRESELECT
*End Step
** ----------------------------------------------------------------
**
** STEP: Step-MatrixOutput
**
*Step, name=Step-MatrixOutput
*Matrix Generate, stiffness, mass, viscous damping, structural damping, load
*Matrix Output, stiffness, mass, viscous damping, structural damping, load, format=Matrix Input
**
** BOUNDARY CONDITIONS
**
** Name: BC-1 Type: Displacement/Rotation
*Boundary
_PickedSet4, 1, 1
_PickedSet4, 2, 2
**
** LOADS
**
** Name: Load-1   Type: Concentrated force
*Cload
_PickedSet5, 1, 1000.
**
*End Step
